# Лабораторна робота №6 Виконав студент групи ІС-31 Коваль Богдан. 11 Варіант
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# Запишемо вхідні дані відповідно варіанта
k := 1
a := 1.0 + 0.4*k = 1.4
# Дане рівняння: | Межі відрізка: | Крок: | Кількість ітерацій:
f(x, y) := cos(1.4*x + y) + (x - y)
a := 0
b := 1
h := 0.1
M := 10
# Початкове знач. функції:
y0 := [0]
# Розв'язок за допомогою методів в MathCAD
# В MathCAD для обрахунку методом Рунге Кутта існує функція rkfixed
RungeKuttMethod_MathCAD := rkfixed(y0, a, b, M, f) = [
    0, 0;
    0.1, 0.0990703;
    0.2, 0.192903;
    0.3, 0.277432;
    0.4, 0.35014;
    0.5, 0.410023;
    0.6, 0.457301;
    0.7, 0.493037;
    0.8, 0.518781;
    0.9, 0.536298;
    1, 0.547399
]
x
# В MathCAD для обрахунку методом Адамса існує функція Adams
AdamsMethod_MathCAD := Adams(y0, a, b, M, f, 0.0001) = [
    0, 0;
    0.1, 0.0990565;
    0.2, 0.192902;
    0.3, 0.277443;
    0.4, 0.350156;
    0.5, 0.41002;
    0.6, 0.45729;
    0.7, 0.493019;
    0.8, 0.518761;
    0.9, 0.536265;
    1, 0.547358
]
# Позначемо отримані результати на графіку
# [plot: RungeKuttMethod_MathCAD[:, 1], AdamsMethod_MathCAD[:, 1] vs RungeKuttMethod_MathCAD[:, 0], AdamsMethod_MathCAD[:, 0]]
# З графіка видно, що значення функцій близькі. Похибка несуттюва
# Розв'язок програмою
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RungeKuttMethod_Program := [
    0, 0;
    0.1, 0.0990702940891;
    0.2, 0.192903138034;
    0.3, 0.277432063967;
    0.4, 0.350140009597;
    0.5, 0.410022953922;
    0.6, 0.457301181928;
    0.7, 0.493037136358;
    0.8, 0.518780509488;
    0.9, 0.536298270826;
    1, 0.547398824529
]
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AdamsMethod_Program := [
    0, 0;
    0.1, 0.0990702940891;
    0.2, 0.192903138034;
    0.3, 0.277432063967;
    0.4, 0.350140009597;
    0.5, 0.410054225262;
    0.6, 0.457420955544;
    0.7, 0.493267905076;
    0.8, 0.519063820089;
    0.9, 0.536610519207;
    1, 0.547694711976
]
# [plot: RungeKuttMethod_Program[:, 1], AdamsMethod_Program[:, 1] vs RungeKuttMethod_Program[:, 0], AdamsMethod_Program[:, 0]]
# Запис похибки
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Runge_Kutt_fault := [
    0.0, 0;
    0.1, 2.04596797541*10^-8;
    0.2, 3.25438560174*10^-8;
    0.3, 4.62368681712*10^-8;
    0.4, 5.62054522849*10^-8;
    0.5, 5.93456924602*10^-8;
    0.6, 5.56573060528*10^-8;
    0.7, 4.7134502712*10^-8;
    0.8, 3.62776932642*10^-8;
    0.9, 2.51663653472*10^-8;
    1.0, 1.51635741519*10^-8
]
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Adams_fault := [
    0.0, 0;
    0.1, 7.25472204406*10^-8;
    0.2, 7.25472204406*10^-8;
    0.3, 7.25472204406*10^-8;
    0.4, 7.25472204406*10^-8;
    0.5, 7.25472204406*10^-8;
    0.6, 7.25472204406*10^-8;
    0.7, 7.25472204406*10^-8;
    0.8, 7.25472204406*10^-8;
    0.9, 7.25472204406*10^-8;
    1.0, 7.25472204406*10^-8
]
# [plot: Runge_Kutt_fault[:, 1], Adams_fault[:, 1] vs Runge_Kutt_fault[:, 0], Adams_fault[:, 0]]
# Побудуємо графік:
# Загальне порівняння
# [plot: RungeKuttMethod_Program[:, 1], RungeKuttMethod_MathCAD[:, 1], AdamsMethod_Program[:, 1], AdamsMethod_MathCAD[:, 1] vs RungeKuttMethod_Program[:, 0]]
# Розв'язок СЛ в системі MathCAD
# вектор початкових значень
# початкова/кінцева точка
# розрахунку
y0 := [0.1; 0]
t1 := 50
t0 := 0
# число кроків
# векторна функція
M := 100
D(x, y) := [y[1]; -y[0] + 0.1*y[1]]
res := rkfixed(y0, t0, t1, M, D) = [
    0, 0.1, 0;
    0.5, 0.0875495, -0.0491357;
    1, 0.052506, -0.0884504;
    1.5, 0.00250801, -0.107583;
    2, -0.0506659, -0.100707;
    2.5, -0.0938408, -0.0682216;
    3, -0.115678, -0.0169705;
    3.5, -0.109614, 0.0411479;
    4, -0.0757485, 0.0919063;
    4.5, -0.0211586, 0.122199
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]
# Побудуємо графік
# [plot: res[:, 1] vs res[:, 0]]
# [plot: res[:, 2] vs res[:, 0]]
# Фазовий портрет
# [plot: res[:, 2] vs res[:, 1]]
